New Transformer.trafo_75605182_75605182 phases=3 windings=2 %loadloss=0.16999999999999998 wdg=1 conn=delta Kv=11.0 kva=200.0 bus=sourcebus_11000 wdg=2 conn=wye Kv=0.41500000000000004 kva=200.0 bus=3094541 XHL=6.05
