! data exported through PowerModelsDistribution.jl
Clear
new circuit.Lower_Hunter_Region_D014470 bus1=N119941 basekv=0.433 basemva=1.0 pu=1.0 mvasc1=1e6 mvasc3=1e6 angle=0

! vsource

! linecode

! line
new line.line5 bus1=N119946 bus2=N119947 linecode=415V_185CU4_P_L_* length=51.84 units=m
new line.line2 bus1=N119943 bus2=N119944 linecode=415V_185CU4_P_L_* length=65.29 units=m
new line.line7 bus1=N119948 bus2=N599941 linecode=240AL length=31.02 units=m
new line.line8 bus1=N119942 bus2=N599942 linecode=415V_185CU4_P_L_* length=40.3 units=m
new line.line13 bus1=N119951 bus2=N599944 linecode=240AL length=0.1 units=m
new line.line9 bus1=N119945 bus2=N119949 linecode=415V_185CU4_P_L_* length=31.78 units=m
new line.line6 bus1=N119947 bus2=N119948 linecode=240AL length=58.78 units=m
new line.line12 bus1=N119948 bus2=N119951 linecode=240AL length=38.36 units=m
new line.line14 bus1=N119951 bus2=N599945 linecode=240AL length=32.91 units=m
new line.line3 bus1=N119944 bus2=N119945 linecode=415V_185CU4_P_L_* length=32.18 units=m
new line.line10 bus1=N119949 bus2=N119950 linecode=415V_185CU4_P_L_* length=44.36 units=m
new line.line4 bus1=N119945 bus2=N119946 linecode=415V_185CU4_P_L_* length=39.24 units=m
new line.line1 bus1=N119942 bus2=N119943 linecode=415V_185CU4_P_L_* length=40.37 units=m
new line.line0 bus1=N119941 bus2=N119942 linecode=415V_185CU4_P_L_* length=22.68 units=m
new line.line11 bus1=N119950 bus2=N599943 linecode=415V_185CU4_P_L_* length=40.36 units=m

! load
new load.load24 phases=3 bus1=N119946.1.2.3.0 kv=0.433 kw=1.0 kvar=1.0 model=1 conn=wye vminpu=0.7 vmaxpu=1.3
new load.load26 phases=3 bus1=N119943.1.2.3.0 kv=0.433 kw=1.0 kvar=1.0 model=1 conn=wye vminpu=0.7 vmaxpu=1.3
new load.load2 phases=3 bus1=N119944.1.2.3.0 kv=0.433 kw=1.0 kvar=1.0 model=1 conn=wye vminpu=0.7 vmaxpu=1.3
new load.load11 phases=3 bus1=N599944.1.2.3.0 kv=0.433 kw=1.0 kvar=1.0 model=1 conn=wye vminpu=0.7 vmaxpu=1.3
new load.load3 phases=3 bus1=N119944.1.2.3.0 kv=0.433 kw=1.0 kvar=1.0 model=1 conn=wye vminpu=0.7 vmaxpu=1.3
new load.load8 phases=3 bus1=N599942.1.2.3.0 kv=0.433 kw=1.0 kvar=1.0 model=1 conn=wye vminpu=0.7 vmaxpu=1.3
new load.load13 phases=3 bus1=N119949.1.2.3.0 kv=0.433 kw=1.0 kvar=1.0 model=1 conn=wye vminpu=0.7 vmaxpu=1.3
new load.load21 phases=3 bus1=N119950.1.2.3.0 kv=0.433 kw=1.0 kvar=1.0 model=1 conn=wye vminpu=0.7 vmaxpu=1.3
new load.load12 phases=3 bus1=N119949.1.2.3.0 kv=0.433 kw=1.0 kvar=1.0 model=1 conn=wye vminpu=0.7 vmaxpu=1.3
new load.load22 phases=3 bus1=N119950.1.2.3.0 kv=0.433 kw=1.0 kvar=1.0 model=1 conn=wye vminpu=0.7 vmaxpu=1.3
new load.load29 phases=3 bus1=N119942.1.2.3.0 kv=0.433 kw=1.0 kvar=1.0 model=1 conn=wye vminpu=0.7 vmaxpu=1.3
new load.load10 phases=3 bus1=N599944.1.2.3.0 kv=0.433 kw=1.0 kvar=1.0 model=1 conn=wye vminpu=0.7 vmaxpu=1.3
new load.load28 phases=3 bus1=N119942.1.2.3.0 kv=0.433 kw=1.0 kvar=1.0 model=1 conn=wye vminpu=0.7 vmaxpu=1.3
new load.load7 phases=3 bus1=N599942.1.2.3.0 kv=0.433 kw=1.0 kvar=1.0 model=1 conn=wye vminpu=0.7 vmaxpu=1.3
new load.load15 phases=3 bus1=N119948.1.2.3.0 kv=0.433 kw=1.0 kvar=1.0 model=1 conn=wye vminpu=0.7 vmaxpu=1.3
new load.load27 phases=3 bus1=N119943.1.2.3.0 kv=0.433 kw=1.0 kvar=1.0 model=1 conn=wye vminpu=0.7 vmaxpu=1.3
new load.load18 phases=3 bus1=N599945.1.2.3.0 kv=0.433 kw=1.0 kvar=1.0 model=1 conn=wye vminpu=0.7 vmaxpu=1.3
new load.load5 phases=3 bus1=N599941.1.2.3.0 kv=0.433 kw=1.0 kvar=1.0 model=1 conn=wye vminpu=0.7 vmaxpu=1.3
new load.load1 phases=3 bus1=N119947.1.2.3.0 kv=0.433 kw=1.0 kvar=1.0 model=1 conn=wye vminpu=0.7 vmaxpu=1.3
new load.load4 phases=3 bus1=N599941.1.2.3.0 kv=0.433 kw=1.0 kvar=1.0 model=1 conn=wye vminpu=0.7 vmaxpu=1.3
new load.load14 phases=3 bus1=N119949.1.2.3.0 kv=0.433 kw=1.0 kvar=1.0 model=1 conn=wye vminpu=0.7 vmaxpu=1.3
new load.load20 phases=3 bus1=N119945.1.2.3.0 kv=0.433 kw=1.0 kvar=1.0 model=1 conn=wye vminpu=0.7 vmaxpu=1.3
new load.load23 phases=3 bus1=N119946.1.2.3.0 kv=0.433 kw=1.0 kvar=1.0 model=1 conn=wye vminpu=0.7 vmaxpu=1.3
new load.load19 phases=3 bus1=N119945.1.2.3.0 kv=0.433 kw=1.0 kvar=1.0 model=1 conn=wye vminpu=0.7 vmaxpu=1.3
new load.load17 phases=3 bus1=N599945.1.2.3.0 kv=0.433 kw=1.0 kvar=1.0 model=1 conn=wye vminpu=0.7 vmaxpu=1.3
new load.load6 phases=3 bus1=N599941.1.2.3.0 kv=0.433 kw=1.0 kvar=1.0 model=1 conn=wye vminpu=0.7 vmaxpu=1.3
new load.load9 phases=3 bus1=N599942.1.2.3.0 kv=0.433 kw=1.0 kvar=1.0 model=1 conn=wye vminpu=0.7 vmaxpu=1.3
new load.load16 phases=3 bus1=N119948.1.2.3.0 kv=0.433 kw=1.0 kvar=1.0 model=1 conn=wye vminpu=0.7 vmaxpu=1.3
new load.load25 phases=3 bus1=N119943.1.2.3.0 kv=0.433 kw=1.0 kvar=1.0 model=1 conn=wye vminpu=0.7 vmaxpu=1.3
new load.load30 phases=3 bus1=N599943.1.2.3.0 kv=0.433 kw=1.0 kvar=1.0 model=1 conn=wye vminpu=0.7 vmaxpu=1.3

Buscoords D014470_buscoords.csv
set voltagebases=[0.4]
set tolerance=0.000001
set defaultbasefreq=50.0
calcvoltagebases
solve
